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/batch
! ANSYS input file written by Workbench version 2022 R1
! File used for geometry attach: C:\Users\Feynman\Desktop\workbench\02Thermal_expansion\Composite Bar_files\dp0\SYS\DM\SYS.agdb
/title,Composite Bar--Static Structural (B5)
/com,--- Data in consistent MKS units. See Solving Units in the help system for more information.
/units,MKS
/prep7
! Turn off shape checking because checks already performed inside WB mesher.
! See help system for more information.
SHPP,OFF,,NOWARN
etcon,set             ! allow ANSYS to choose best KEYOP's for 180x elements, resets any applicable keyopt to MAPDL defaults
/com,*********** Nodes for the whole assembly ***********
nblock,3,,3510
(1i9,3e20.9e3)
        1    -5.610199093E-03    -1.985647618E-02     3.750000000E-02
        2    -5.610199093E-03    -1.985647618E-02     7.500000000E-02
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-1
/com,*********** Elements for Body 1 "Copper" ***********
et,1,186
keyo,1,2,1          ! set full integration on SOLID186
eblock,19,solid,,308
(19i9)
        1        1        1        1        0        0        0        0       20        0      289     1608     1618     1638     1668     1849     1848     1846     1843
     2041     2092     2184     2043     2820     2819     2814     2815     2045     2095     2186     2298
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-1
/com,*********** Elements for Body 2 "Steel" ***********
et,2,186
keyo,2,2,1          ! set full integration on SOLID186
eblock,19,solid,,112
(19i9)
        2        2        2        2        0        0        0        0       20        0      177      985     1027      999     1006     1048     1042     1046     1045
     1204     1270     1268     1203     1398     1396     1406     1407     1206     1363     1271     1305
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-1
/com,*********** Elements for Body 3 "Brass" ***********
et,3,186
keyo,3,2,1          ! set full integration on SOLID186
eblock,19,solid,,176
(19i9)
        3        3        3        3        0        0        0        0       20        0        1        1       46      106       91      128      125      121      122
      275      442      595      276      682      673      671      676      277      443      641      596
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-1
/com,*********** Send User Defined Coordinate System(s) ***********
csys,0
toffst,273.15,  ! Temperature offset from absolute zero
/com,*********** Set Reference Temperature ***********
tref,22.
/com,*********** Send Materials ***********
Temperature = 'TEMP' ! Temperature
MP,DENS,1,7850,	! kg m^-3
MP,ALPX,1,1.2e-05,	! C^-1
MP,C,1,434,	! J kg^-1 C^-1
MP,KXX,1,400,	! W m^-1 C^-1
MP,RSVX,1,1.7e-07,	! kg m^3 A^-2 s^-3
MP,EX,1,200000000000,	! Pa
MP,NUXY,1,0.3,
MP,MURX,1,10000,

Temperature = 'TEMP' ! Temperature
MP,DENS,2,7850,	! kg m^-3
MP,ALPX,2,1.2e-05,	! C^-1
MP,C,2,434,	! J kg^-1 C^-1
MP,KXX,2,60.5,	! W m^-1 C^-1
MP,RSVX,2,1.7e-07,	! kg m^3 A^-2 s^-3
MP,EX,2,200000000000,	! Pa
MP,NUXY,2,0.3,
MP,MURX,2,10000,

Temperature = 'TEMP' ! Temperature
MP,DENS,3,7850,	! kg m^-3
MP,ALPX,3,1.2e-05,	! C^-1
MP,C,3,434,	! J kg^-1 C^-1
MP,KXX,3,120,	! W m^-1 C^-1
MP,RSVX,3,1.7e-07,	! kg m^3 A^-2 s^-3
MP,EX,3,200000000000,	! Pa
MP,NUXY,3,0.3,
MP,MURX,3,10000,

!************************* Model Summary ********************
!Copper,	Copper,	matid,	1
!Steel,	Structural Steel,	matid,	2
!Brass,	Brass,	matid,	3
!************************* End Model Summary ********************
/com,*********** Create Contact "Contact Region" ***********
*set,tid,5
*set,cid,4
r,tid
r,cid
et,tid,170
et,cid,174
eblock,10,,,28
(15i9)
     1065        5        5        5        0     1843     1849     1848     1846     2815     2820     2819     2814
     1066        5        5        5        0     1835     1847     1846     1848     2797     2818     2819     2798
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-1
eblock,10,,,28
(15i9)
     1093        4        4        4        0     1843     1849     1848     1846     2815     2820     2819     2814
     1094        4        4        4        0     1835     1847     1846     1848     2797     2818     2819     2798
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-1
eblock,10,,,14
(15i9)
     1121        4        5        4        0     1055     1059     1053     1056     1429     1421     1420     1427
     1122        4        5        4        0     1055     1058     1054     1059     1428     1424     1425     1429
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-1
eblock,10,,,14
(15i9)
     1135        5        4        5        0     1055     1059     1053     1056     1429     1421     1420     1427
     1136        5        4        5        0     1055     1058     1054     1059     1428     1424     1425     1429
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-1
keyo,cid,8,2               ! auto create asymmetric contact (from Program Controlled setting)
keyo,cid,10,0              ! adjust contact stiffness each NR iteration (from Program Controlled setting)
keyo,cid,12,5              ! bonded always
keyo,cid,18,1              ! small sliding turned on by application
keyo,cid,2,0               ! augmented Lagrange (from Program Controlled setting)
keyo,cid,4,0               ! on Gauss point (from Program Controlled setting)
keyo,cid,9,1               ! ignore initial gaps/penetration
keyo,cid,7,0               ! No Prediction
rmod,tid,3,10.      ! FKN
rmod,tid,5,0.       ! ICONT
rmod,tid,6,0.       ! PINB
rmod,tid,10,0.      ! CNOF
rmod,tid,12,0.      ! FKT
rmod,tid,36,34      ! WB DSID
rmod,cid,3,10.      ! FKN
rmod,cid,5,0.       ! ICONT
rmod,cid,6,0.       ! PINB
rmod,cid,10,0.      ! CNOF
rmod,cid,12,0.      ! FKT
rmod,cid,36,34      ! WB DSID
/com,*********** Create Contact "Contact Region 2" ***********
*set,tid,7
*set,cid,6
r,tid
r,cid
et,tid,170
et,cid,174
eblock,10,,,14
(15i9)
     1149        7        7        7        0     1048     1042     1046     1045     1398     1396     1406     1407
     1150        7        7        7        0     1047     1043     1046     1042     1401     1400     1396     1397
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-1
eblock,10,,,14
(15i9)
     1163        6        6        6        0     1048     1042     1046     1045     1398     1396     1406     1407
     1164        6        6        6        0     1047     1043     1046     1042     1401     1400     1396     1397
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-1
eblock,10,,,11
(15i9)
     1177        6        7        6        0      135      136      132      129      704      697      690      691
     1178        6        7        6        0      135      129      144      143      691      692      720      705
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-1
eblock,10,,,11
(15i9)
     1188        7        6        7        0      135      136      132      129      704      697      690      691
     1189        7        6        7        0      135      129      144      143      691      692      720      705
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-1
keyo,cid,8,2               ! auto create asymmetric contact (from Program Controlled setting)
keyo,cid,10,0              ! adjust contact stiffness each NR iteration (from Program Controlled setting)
keyo,cid,12,5              ! bonded always
keyo,cid,18,1              ! small sliding turned on by application
keyo,cid,2,0               ! augmented Lagrange (from Program Controlled setting)
keyo,cid,4,0               ! on Gauss point (from Program Controlled setting)
keyo,cid,9,1               ! ignore initial gaps/penetration
keyo,cid,7,0               ! No Prediction
rmod,tid,3,10.      ! FKN
rmod,tid,5,0.       ! ICONT
rmod,tid,6,0.       ! PINB
rmod,tid,10,0.      ! CNOF
rmod,tid,12,0.      ! FKT
rmod,tid,36,37      ! WB DSID
rmod,cid,3,10.      ! FKN
rmod,cid,5,0.       ! ICONT
rmod,cid,6,0.       ! PINB
rmod,cid,10,0.      ! CNOF
rmod,cid,12,0.      ! FKT
rmod,cid,36,37      ! WB DSID
nsel,all
esel,all
/com,*********** Fixed Supports ***********
CMBLOCK,_FIXEDSU,NODE,      141
(8i10)
       121       122       123       124       125       126       127       128
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cmsel,s,_FIXEDSU
d,all,all
nsel,all
fini
/com,****************************************************************************
/com,*************************    SOLUTION       ********************************
/com,****************************************************************************
/solu
antype,0                   ! static analysis
_thickRatio=  1     ! Ratio of thick parts in the model
eqsl,pcg,1e-8,,,,,,1
cntr,print,1               ! print out contact info and also make no initial contact an error
dmpoption,emat,no             ! Don't combine emat file for DANSYS
dmpoption,esav,no             ! Don't combine esav file for DANSYS
nldiag,cont,iter           ! print out contact info each equilibrium iteration
rescontrol,,none                 ! Do not keep any restart files
/com,****************************************************
/com,******************* SOLVE FOR LS 1 OF 1 ****************
/com,*********** Create Imported Load "Imported Body Temperature" ***********
bfblock,2,temp,3191,3191,0
(i9,e20.9e3)
        1     7.000000000e+01
        2     7.000000000e+01
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bf,end,loc,-1,
nsub,1,1,1
time,1.
outres,erase
outres,all,none
outres,nsol,all,
outres,rsol,all
outres,eangl,all
outres,etmp,all
outres,veng,all
outres,strs,all,
outres,epel,all,
outres,eppl,all,
outres,epth,all,
outres,cont,all,
! *********** WB SOLVE COMMAND ***********
! check interactive state
*get,ANSINTER_,active,,int
*if,ANSINTER_,ne,0,then
/eof
*endif
solve
/com *************** Write FE CONNECTORS *********
CEWRITE,file,ce,,INTE
/com,****************************************************
/com,*************** FINISHED SOLVE FOR LS 1 *************
*get,_PCGITER,active,,solu,cgiter
/post1
fini
